# B-field of a horizontal bar magnet
C := 1  # coefficient to linearly scale everything as needed.
a := 250
b := 50
R := b/2
# a = length of bar magnet in arbritrary units | b=width of bar magnet
# R = radius of bar magnet
# The following are elliptic integrals for x and y components of the B-field.  Magnet is oriented horizontally along the x-direction. These integrals have no analytical solution.  The field is scaled so the B at the center of an infinitely long bar magnet is 1.  The field at the center of a finite-length magnet is a little less than 1.
Bx(x, y) := C*R/(4*π)*integral(integral((R - y*sin(phi))/(R^2 + y^2 - 2*y*R*sin(phi) + (x - xp)^2)^(3/2), phi = 0 .. 2*π), xp = -a/2 .. a/2)
By(x, y) := C*R/(4*π)*integral(integral((x - xp)*sin(phi)/(R^2 + y^2 - 2*y*R*sin(phi) + (x - xp)^2)^(3/2), phi = 0 .. 2*π), xp = -a/2 .. a/2)
# Check: B at middle of right edge of magnet should be about 1/2 of B-field at center.
Bx(0, 0) = 0.980581
Bx(a/2, 0) = 0.497519
Bx(a/2, 0)/Bx(0, 0) = 0.507371
B_mag(x, y) := sqrt(Bx(x, y)^2 + By(x, y)^2)  # Magnitude of B-field (unused)
B(y, z) := [Bx(y, z); By(y, z)]  # Actual B-field
# Following line scales B so that it does not appear to fall off with distance too rapidly.
# THIS ASSUMES THAT B=1 at CENTER OF MAGNET. (This is unused in this mathcad file).
n := 4  # n is a number between 1(no rescaling) and, say, 5 (big rescaling)
B_dir(x, y) := [Bx(x, y)/B_mag(x, y); (By(x, y)/B_mag(x, y))]
Bscaled(x, y) := [nthroot(B_mag(x, y), n)*Bx(x, y)/B_mag(x, y); (nthroot(B_mag(x, y), n)*By(x, y)/B_mag(x, y))]
# Compute field interior to magnet:
b = 50
a = 250
xrange := a/2
yrange := b/2
xdel := 5
ydel := 5
i := 0 .. xrange/xdel
j := 0 .. yrange/ydel
gridOffset := 0.1
# Offset is so that none of the points fall exactly on the edge of
# the magnet, where the integrals do not converge.
xind[i] := i*xdel - gridOffset
yind[j] := j*ydel - gridOffset
M[i, j] := B(xind[i], yind[j])
iMax := xrange/xdel
jMax := yrange/ydel
BX_int[i, j] := M[i, j][0]
iMax = 25
jMax = 5
BY_int[i, j] := M[i, j][1]
BXrounded_int[i, j] := round(BX_int[i, j], 6)
BYrounded_int[i, j] := round(BY_int[i, j], 6)
BXrounded_int = [
    0.980581, 0.980622, 0.98075, 0.980961, 0.981251, 0.978877;
    0.980497, 0.980539, 0.980669, 0.980882, 0.981176, 0.978833;
    0.980236, 0.98028, 0.980415, 0.980638, 0.980944, 0.978598;
    0.979791, 0.979838, 0.979983, 0.980221, 0.980548, 0.978265;
    0.979148, 0.9792, 0.979359, 0.97962, 0.979978, 0.97907;
    0.978288, 0.978346, 0.978525, 0.978818, 0.979219, 0.977029;
    0.977183, 0.97725, 0.977455, 0.977791, 0.978249, 0.976101;
    0.975796, 0.975875, 0.976115, 0.976508, 0.977042, 0.97497;
    0.974079, 0.974173, 0.974459, 0.974927, 0.97556, 0.973613;
    0.971966, 0.972081, 0.972428, 0.972994, 0.973756, 0.971971;
    0.969374, 0.969515, 0.969944, 0.970639, 0.971572, 0.96998;
    0.966188, 0.966365, 0.966902, 0.96777, 0.968927, 0.967604;
    0.962257, 0.962482, 0.963165, 0.964265, 0.965723, 0.96471;
    0.957375, 0.957667, 0.958548, 0.959963, 0.961827, 0.961322;
    0.951262, 0.951645, 0.952801, 0.95465, 0.957068, 0.95718;
    0.943527, 0.94404, 0.94558, 0.948032, 0.951216, 0.952195;
    0.933627, 0.934321, 0.936405, 0.939708, 0.943968, 0.946094;
    0.920787, 0.921741, 0.924599, 0.929117, 0.934906, 0.938777;
    0.90391, 0.905232, 0.909197, 0.915461, 0.923458, 0.929679;
    0.881434, 0.883272, 0.888803, 0.897582, 0.908805, 0.918457;
    0.851199, 0.853723, 0.86139, 0.873742, 0.88973, 0.904841;
    0.810368, 0.813704, 0.824031, 0.841227, 0.864282, 0.889095;
    0.755699, 0.759737, 0.772656, 0.795597, 0.828922, 0.866264;
    0.684601, 0.688674, 0.702346, 0.729375, 0.775872, 0.838574;
    0.597358, 0.600098, 0.609778, 0.63171, 0.683347, 0.801231;
    0.499517, 0.499578, 0.499798, 0.500334, 0.501987, 0.623511
]
# [component: inputs (BX_int, BY_int)]
# B-field in interior (top, right quarter) of bar magnet
# Compute field outside magnet, nearby with dense grid
xrange := 2*a
yrange := 8*b
xdel := 5
ydel := 5
BYrounded_int =  # no stored result
i := 0 .. xrange/xdel
j := 0 .. yrange/ydel
xrange = 500
yrange = 400
iMax := xrange/xdel
jMax := yrange/ydel
iMax = 100
jMax = 80
gridOffset := 0.1
# Offset is so that none of the points fall exactly on the edge of
# the magnet, where the integrals do not converge.
xind[i] := i*xdel + gridOffset
yind[j] := j*ydel + gridOffset
M[i, j] := B(xind[i], yind[j])
BX_ext1[i, j] := M[i, j][0]
BY_ext1[i, j] := M[i, j][1]
BXrounded_ext1[i, j] := round(BX_ext1[i, j], 6)
BYrounded_ext1[i, j] := round(BY_ext1[i, j], 6)
# [component: inputs (BX_ext1, BY_ext1)]
BXrounded_ext1 =  # no stored result
# B-field in interior (top, right quarter) of bar magnet
BYrounded_ext1 =  # no stored result
# Compute B-field far away, with sparse grid.
xrange := 10*a
yrange := 24*b
xdel := 20
ydel := 20
xrange = 2500
i := 0 .. xrange/xdel
j := 0 .. yrange/ydel
yrange = 1200
gridOffset := 0
# Offset is so that none of the points fall exactly on the edge of
# the magnet, where the integrals do not converge.
xind[i] := i*xdel + gridOffset
yind[j] := j*ydel + gridOffset
M[i, j] := B(xind[i], yind[j])
BX_ext2[i, j] := M[i, j][0]
BY_ext2[i, j] := M[i, j][1]
BXrounded_ext2[i, j] := round(BX_ext2[i, j], 7)
BYrounded_ext2[i, j] := round(BY_ext2[i, j], 7)
BXrounded_ext2 =  # no stored result
# [component: inputs (BX_ext2, BY_ext2)]
# B-field in interior (top, right quarter) of bar magnet
BYrounded_ext2 =  # no stored result
